Fri Aug 16 17:31:54 UTC 2019
$SIZES LVR=50
$PROBLEM RUN friberg3.4 neutropenia PKPD example with Friberg-Karlsson PK-PD

$INPUT C ID TIME EVID AMT CMT DVO DV WT DVID
$DATA ../../../data/friberg.csv IGNORE=(C='C')

$ABBR DECLARE INTEGER FIRST_WRITE_PAR
$ABBR DECLARE INTEGER FIRST_WRITE_IPAR

$SUBROUTINES ADVAN13 TOL=6 OTHER = ../../extrasend.f90

$MODEL
NCOMPARTMENTS=8
COMP = (GUT, DEFDOSE)
COMP = (CENT)
COMP = (PERIPH)
COMP = (PROL)
COMP = (TRANS1)
COMP = (TRANS2)
COMP = (TRANS3)
COMP = (CIRC)

$PK
; Request extra information for Bayesian analysis.
; An extra call will then be made for accepted samples
include '/opt/NONMEM/nm74/util/nonmem_reserved_general'
BAYES_EXTRA_REQUEST=1

nThin = THETA(12)

VWT = LOG(WT/70) ; normalized to 70 kg adult

MU_1 = THETA(1) + 0.75*VWT       ; CL
MU_2 = THETA(2) + 0.75*VWT       ; Q
MU_3 = THETA(3) + VWT            ; V1
MU_4 = THETA(4) + VWT            ; V2
MU_5 = THETA(5)                  ; KA
MU_6 = THETA(6)                  ; MTT
MU_7 = THETA(7)                  ; CIRC0
MU_8 = THETA(8)                  ; ALPHA
MU_9 = THETA(9)                  ; GAMMA
MU_10 = THETA(10)                ; log(SIGMA) additive error PK
MU_11 = THETA(11)                ; log(SIGMA) additive error PD

" CALL EXTRASEND()

CL  = EXP(MU_1 +ETA(1))
Q   = EXP(MU_2 +ETA(2))
V1  = EXP(MU_3 +ETA(3))
V2  = EXP(MU_4 +ETA(4))
KA  = EXP(MU_5 +ETA(5))
MTT = EXP(MU_6 +ETA(6))
CIRC0=EXP(MU_7 +ETA(7))
ALPHA=EXP(MU_8 +ETA(8))

GAMMA= EXP(MU_9 + ETA(9))
SIG1 = EXP(MU_10 + ETA(10)) ; Additive Error PK
SIG2 = EXP(MU_11 + ETA(11)) ; Additive Error PD

; intermediate calculations
K10 = CL/V1
K12 = Q/V1
K21 = Q/V2
KTR = 4/MTT

KPROL = KTR
KCIRC = KTR

; initial PK conditions
A_0(1) = 0
A_0(2) = 0
A_0(3) = 0

; initial PD conditions
A_0(4) = CIRC0
A_0(5) = CIRC0
A_0(6) = CIRC0
A_0(7) = CIRC0
A_0(8) = CIRC0

S2 = V1
S3 = V2

IF(BAYES_EXTRA==1 .AND. NIREC==1 .AND. NDREC==1 .AND. &
     ITER_REPORT>0 .AND. &
     ITER_REPORT/nThin == INT(ITER_REPORT/nThin)) THEN
IF(FIRST_WRITE_PAR==0) THEN
" OPEN(unit=52,FILE='./par.txt')
    FIRST_WRITE_PAR=1
  ENDIF
  " WRITE(52,'(I12,1X,50(1X,1PG19.10E3))') ITER_REPORT, &
  " THETA(1), THETA(2), THETA(3), THETA(4), THETA(5), THETA(6), THETA(7), &
  " THETA(8), THETA(9), THETA(10), THETA(11), &
  " OMEGA(1,1), OMEGA(2,1), OMEGA(2,2), &
  " OMEGA(3,1), OMEGA(3,2), OMEGA(3,3), &
  " OMEGA(4,1), OMEGA(4,2), OMEGA(4,3), OMEGA(4,4), &
  " OMEGA(5,1), OMEGA(5,2), OMEGA(5,3), OMEGA(5,4), OMEGA(5,5), &
  " OMEGA(6,1), OMEGA(6,2), OMEGA(6,3), OMEGA(6,4), OMEGA(6,5), OMEGA(6,6), &
  " OMEGA(7,1), OMEGA(7,2), OMEGA(7,3), OMEGA(7,4), OMEGA(7,5), OMEGA(7,6), OMEGA(7,7), &
  " OMEGA(8,1), OMEGA(8,2), OMEGA(8,3), OMEGA(8,4), OMEGA(8,5), OMEGA(8,6), OMEGA(8,7), OMEGA(8,8)
ENDIF

IF(BAYES_EXTRA==1 .AND. NDREC==1 .AND. ITER_REPORT>0 .AND. &
  ITER_REPORT/nThin == INT(ITER_REPORT/nThin)) THEN
  IF(FIRST_WRITE_IPAR==0) THEN
    " OPEN(unit=50,FILE='./ipar'//TFI(PNM_NODE_NUMBER)//'.txt')
    FIRST_WRITE_IPAR=1
  ENDIF
  " WRITE(50,'(I12,1X,F14.0,13(1X,1PG12.5))') ITER_REPORT, ID, &
  " ETA(1), ETA(2), ETA(3), ETA(4), ETA(5), ETA(6), ETA(7), ETA(8)
ENDIF

$DES

DADT(1) = -KA*A(1)
DADT(2) =  KA*A(1) - (K10 + K12)*A(2) + K21*A(3)
DADT(3) =  K12 *A(2) - K21*A(3)

CONC = A(2)/V1 ; Drug concentration

EDRUG = ALPHA * CONC
IF(EDRUG > 1.0) EDRUG = 1.0

DADT(4) = KPROL *A(4) *(1 - EDRUG) * ((CIRC0 / A(8)) **GAMMA) - KTR *A(4)
DADT(5) = KTR * (A(4) - A(5))
DADT(6) = KTR * (A(5) - A(6))
DADT(7) = KTR * (A(6) - A(7))
DADT(8) = KTR*A(7) - KCIRC*A(8)

$ERROR (OBSERVATIONS ONLY)
IPRED = LOG(F)
IND = 0
IF(DVID.EQ.2) IND = 1
YPK = IPRED+SIG1*EPS(1) ; Error for PK
YPD = IPRED+SIG2*EPS(2) ; Error for PD
Y = YPK*IND + YPD*(1-IND)

; Code below into chains

; Initial values of THETA
$THETA
2.29293650954706      ; Log CL = THETA(1)
2.78187002197878      ; Log Q = THETA(2)
4.10653043167607    ; Log V1 = THETA(3)
5.79441188940434    ; Log V2= THETA(4)
0.758743417852145    ; Log Ka = THETA(5)
4.78975235013628    ; Log MTT = THETA(6)
1.7904012807499    ; Log CIRC0 = THETA(7)
-8.82748705123275    ; Log ALPHA = THETA(8)
-1.91147638613364    ; Log GAMMA = THETA(9)
-1.96694893289804    ; Log PK Add Error = THETA(10)
-1.53523045323129    ; Log PD Add Error = THETA(11)
(1 FIX)
$OMEGA BLOCK(8) ;INITIAL values of OMEGAs
0.384756084711769
-0.00862682205633429
0.133928083343693
-0.00611937059477515
-0.00611937059477515
0.360525225413911
-0.00896799230792607
-0.00896799230792607
-0.00896799230792607
0.202699208207848
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$OMEGA DIAG(3) ;INITIAL values of unused OMEGAs
0 FIX; GAMMA
0 FIX; Add PK
0 FIX; Add PD
$SIGMA  ;Initial value of SIGMA
1 FIX; Add PK
1 FIX; Add PD
$PRIOR NWPRI
$THETAP          ; Prior information of THETAS
(2.3 FIX)     ; CL Log(10)
(2.7 FIX)     ; Q  Log(15)
(3.56 FIX)     ; V1 Log(35)
(4.7 FIX)    ; V2 Log(105)
(0.693 FIX)      ; KA log(2)
(4.83 FIX)    ; MTT Log(125)
(1.61 FIX)      ; CIRC0 Log(5)
(-8.11 FIX)   ; ALPHA Log(3E-4)
(-1.78 FIX)   ; GAMMA Log(0.17)
(-1.60 FIX)   ; log Add error PK Log(0.20)
(-1.60 FIX)   ; log Add error PD Log(0.20)
$THETAPV BLOCK(11)     ;  variances for priors on THETAS (var-cov)
0.25   FIX          ; CL
0.00   0.25            ; Q
0.00   0.00   0.25        ; V1
0.00   0.00   0.00   0.25      ; V2
0.00   0.00   0.00   0.00   0.25    ; KA
0.00   0.00   0.00   0.00   0.00   0.04    ; MTT
0.00   0.00   0.00   0.00   0.00   0.00   0.04    ; CIRC0
0.00   0.00   0.00   0.00   0.00   0.00   0.00   1   ; ALPHA
0.00   0.00   0.00   0.00   0.00   0.00   0.00   0.00  0.04  ; GAMMA
0.00   0.00   0.00   0.00   0.00   0.00   0.00   0.00  0.00  1.00  ; Error PK
0.00   0.00   0.00   0.00   0.00   0.00   0.00   0.00  0.00  0.00  1.00  ; Error PD
$OMEGAP BLOCK(8) ;prior information for OMEGA
0.045    FIX          ; CL
0.00   0.045            ; Q
0.00   0.00   0.045        ; V1
0.00   0.00   0.00   0.045      ; V2
0.00   0.00   0.00   0.00   0.045    ; KA
0.00   0.00   0.00   0.00   0.00   0.045    ; MTT
0.00   0.00   0.00   0.00   0.00   0.00   0.045    ; CIRC0
0.00   0.00   0.00   0.00   0.00   0.00   0.00  0.045   ; ALPHA
$OMEGAPD (11, FIXED)     ; df for OMEGA prior
$ESTIMATION
METHOD=NUTS INTERACTION
AUTO= 2
CTYPE = 0
OLKJDF= 0
OVARF= 1
NUTS_DELTA= 0.8
NBURN = 250 NITER = 250 SEED = 1184
PRINT = 100 NOABORT FILE = /dev/null
$TABLE ID EVID TIME DV IPRED CWRES CWRESI NPDE WT
NOPRINT ONEHEADER FILE=./friberg3.4.tab
$TABLE ID WT CL Q V1 V2 KA MTT CIRC0 ALPHA ETAS(1:LAST)
NOPRINT ONEHEADER FILE=./friberg3.4par.tab

NM-TRAN MESSAGES
 WARNINGS AND ERRORS (IF ANY) FOR PROBLEM    1
 (WARNING  2) NM-TRAN INFERS THAT THE DATA ARE POPULATION.
 (MU_WARNING 20) MU_001: MU_ VARIABLE SHOULD NOT BE DEFINED AFTER VERBATIM CODE.
 (MU_WARNING 26) DATA ITEM(S) USED IN DEFINITION OF MU_(S) SHOULD BE CONSTANT FOR INDIV. REC.:
  WT

1NONLINEAR MIXED EFFECTS MODEL PROGRAM (NONMEM) VERSION 7.4.3
 ORIGINALLY DEVELOPED BY STUART BEAL, LEWIS SHEINER, AND ALISON BOECKMANN
 CURRENT DEVELOPERS ARE ROBERT BAUER, ICON DEVELOPMENT SOLUTIONS,
 AND ALISON BOECKMANN. IMPLEMENTATION, EFFICIENCY, AND STANDARDIZATION
 PERFORMED BY NOUS INFOSYSTEMS.
 PROBLEM NO.:         1
 RUN friberg3.4 neutropenia PKPD example with Friberg-Karlsson PK-PD
 TOT. NO. OF OBS RECS:      410
 TOT. NO. OF INDIVIDUALS:        5
 GENERAL NONLINEAR KINETICS MODEL WITH STIFF/NONSTIFF EQUATIONS (LSODA, ADVAN13)
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 #TBLN:      1
 #METH: NUTS Bayesian Analysis
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
 #TERM:
 BURN-IN WAS NOT TESTED FOR CONVERGENCE
 STATISTICAL PORTION WAS COMPLETED

 TOTAL DATA POINTS NORMALLY DISTRIBUTED (N):          410
 N*LOG(2PI) CONSTANT TO OBJECTIVE FUNCTION:    753.529597227832
 OBJECTIVE FUNCTION VALUE WITHOUT CONSTANT:   -1574.60440819035
 OBJECTIVE FUNCTION VALUE WITH CONSTANT:      -821.074810962520
 REPORTED OBJECTIVE FUNCTION DOES NOT CONTAIN CONSTANT

 TOTAL EFFECTIVE ETAS (NIND*NETA):                            40
 NIND*NETA*LOG(2PI) CONSTANT TO OBJECTIVE FUNCTION:    73.5150826563738
 OBJECTIVE FUNCTION VALUE WITHOUT CONSTANT:   -1574.60440819035
 OBJECTIVE FUNCTION VALUE WITH CONSTANT:      -1501.08932553398
 REPORTED OBJECTIVE FUNCTION DOES NOT CONTAIN CONSTANT

 PRIOR CONSTANT TO OBJECTIVE FUNCTION:    185.679653570575
 OBJECTIVE FUNCTION VALUE WITHOUT CONSTANT:   -1574.60440819035
 OBJECTIVE FUNCTION VALUE WITH CONSTANT:      -1388.92475461978
 REPORTED OBJECTIVE FUNCTION DOES NOT CONTAIN CONSTANT


 #TERE:
 Elapsed estimation  time in seconds: 75337.47
 Elapsed covariance  time in seconds:     0.00

 ********************                              NUTS BAYESIAN ANALYSIS                            ********************
 #OBJT:**************                       AVERAGE VALUE OF LIKELIHOOD FUNCTION                     ********************
 #OBJV:********************************************    -1574.604       **************************************************
 #OBJS:********************************************       11.749 (STD) **************************************************

 ********************                              NUTS BAYESIAN ANALYSIS                            ********************
 ********************                             FINAL PARAMETER ESTIMATE                           ********************

 THETA - VECTOR OF FIXED EFFECTS PARAMETERS   *********
         TH 1      TH 2      TH 3      TH 4      TH 5      TH 6      TH 7      TH 8      TH 9      TH10      TH11      TH12
         2.41E+00  3.10E+00  3.36E+00  4.74E+00  5.01E-01  4.77E+00  1.74E+00 -8.05E+00 -1.89E+00 -2.30E+00 -2.24E+00  1.00E+00

 OMEGA - COV MATRIX FOR RANDOM EFFECTS - ETAS  ********
         ETA1      ETA2      ETA3      ETA4      ETA5      ETA6      ETA7      ETA8      ETA9      ET10      ET11
 ETA1
+        1.27E-01
 ETA2
+       -2.91E-02  1.56E-01
 ETA3
+       -1.01E-02 -7.06E-03  1.06E-01
 ETA4
+        4.68E-02 -5.83E-02 -9.37E-03  1.84E-01
 ETA5
+        4.17E-04  1.07E-02  2.00E-02 -1.74E-02  1.11E-01
 ETA6
+       -1.07E-02  7.76E-03  3.29E-03 -6.33E-03 -1.36E-03  8.57E-02
 ETA7
+        1.38E-02  3.35E-02 -8.33E-04 -1.86E-02  1.39E-02 -1.21E-02  1.10E-01
 ETA8
+        3.57E-02 -2.36E-02  7.19E-03  2.34E-02 -6.13E-03 -8.04E-03  1.05E-02  1.16E-01
 ETA9
+        0.00E+00  0.00E+00  0.00E+00  0.00E+00  0.00E+00  0.00E+00  0.00E+00  0.00E+00  0.00E+00
 ET10
+        0.00E+00  0.00E+00  0.00E+00  0.00E+00  0.00E+00  0.00E+00  0.00E+00  0.00E+00  0.00E+00  0.00E+00
 ET11
+        0.00E+00  0.00E+00  0.00E+00  0.00E+00  0.00E+00  0.00E+00  0.00E+00  0.00E+00  0.00E+00  0.00E+00  0.00E+00

 SIGMA - COV MATRIX FOR RANDOM EFFECTS - EPSILONS  ****
         EPS1      EPS2
 EPS1
+        1.00E+00
 EPS2
+        0.00E+00  1.00E+00

 OMEGA - CORR MATRIX FOR RANDOM EFFECTS - ETAS  *******
         ETA1      ETA2      ETA3      ETA4      ETA5      ETA6      ETA7      ETA8      ETA9      ET10      ET11
 ETA1
+        3.44E-01
 ETA2
+       -2.05E-01  3.80E-01
 ETA3
+       -5.99E-02 -4.32E-02  3.11E-01
 ETA4
+        2.83E-01 -3.45E-01 -1.31E-02  4.12E-01
 ETA5
+       -1.61E-02  7.63E-02  1.57E-01 -1.16E-01  3.20E-01
 ETA6
+       -1.10E-01  6.98E-02  3.97E-02 -5.02E-02 -1.48E-02  2.85E-01
 ETA7
+        1.07E-01  2.33E-01 -3.15E-02 -1.20E-01  9.92E-02 -1.12E-01  3.20E-01
 ETA8
+        2.80E-01 -1.68E-01  4.44E-02  1.63E-01 -5.37E-02 -9.12E-02  9.87E-02  3.29E-01
 ETA9
+        0.00E+00  0.00E+00  0.00E+00  0.00E+00  0.00E+00  0.00E+00  0.00E+00  0.00E+00  0.00E+00
 ET10
+        0.00E+00  0.00E+00  0.00E+00  0.00E+00  0.00E+00  0.00E+00  0.00E+00  0.00E+00  0.00E+00  0.00E+00
 ET11
+        0.00E+00  0.00E+00  0.00E+00  0.00E+00  0.00E+00  0.00E+00  0.00E+00  0.00E+00  0.00E+00  0.00E+00  0.00E+00

 SIGMA - CORR MATRIX FOR RANDOM EFFECTS - EPSILONS  ***
         EPS1      EPS2
 EPS1
+        1.00E+00
 EPS2
+        0.00E+00  1.00E+00

 ********************                              NUTS BAYESIAN ANALYSIS                            ********************
 ********************                STANDARD ERROR OF ESTIMATE (From Sample Variance)               ********************

 THETA - VECTOR OF FIXED EFFECTS PARAMETERS   *********
         TH 1      TH 2      TH 3      TH 4      TH 5      TH 6      TH 7      TH 8      TH 9      TH10      TH11      TH12
         1.45E-01  1.70E-01  1.83E-01  1.56E-01  2.05E-01  1.03E-01  1.16E-01  1.52E-01  8.91E-02  4.58E-02  6.00E-02  0.00E+00

 OMEGA - COV MATRIX FOR RANDOM EFFECTS - ETAS  ********
         ETA1      ETA2      ETA3      ETA4      ETA5      ETA6      ETA7      ETA8      ETA9      ET10      ET11
 ETA1
+        7.70E-02
 ETA2
+        6.04E-02  9.52E-02
 ETA3
+        6.19E-02  6.47E-02  7.79E-02
 ETA4
+        6.90E-02  8.17E-02  7.97E-02  1.13E-01
 ETA5
+        6.34E-02  5.45E-02  5.31E-02  6.36E-02  7.55E-02
 ETA6
+        4.31E-02  4.76E-02  4.20E-02  5.36E-02  4.16E-02  4.26E-02
 ETA7
+        5.27E-02  5.88E-02  5.24E-02  5.96E-02  4.90E-02  4.01E-02  6.95E-02
 ETA8
+        5.60E-02  5.57E-02  4.49E-02  5.81E-02  4.96E-02  3.35E-02  4.57E-02  7.09E-02
 ETA9
+        0.00E+00  0.00E+00  0.00E+00  0.00E+00  0.00E+00  0.00E+00  0.00E+00  0.00E+00  0.00E+00
 ET10
+        0.00E+00  0.00E+00  0.00E+00  0.00E+00  0.00E+00  0.00E+00  0.00E+00  0.00E+00  0.00E+00  0.00E+00
 ET11
+        0.00E+00  0.00E+00  0.00E+00  0.00E+00  0.00E+00  0.00E+00  0.00E+00  0.00E+00  0.00E+00  0.00E+00  0.00E+00

 SIGMA - COV MATRIX FOR RANDOM EFFECTS - EPSILONS  ****
         EPS1      EPS2
 EPS1
+        0.00E+00
 EPS2
+        0.00E+00  0.00E+00

 OMEGA - CORR MATRIX FOR RANDOM EFFECTS - ETAS  *******
         ETA1      ETA2      ETA3      ETA4      ETA5      ETA6      ETA7      ETA8      ETA9      ET10      ET11
 ETA1
+        9.40E-02
 ETA2
+        3.21E-01  1.05E-01
 ETA3
+        3.60E-01  3.51E-01  9.80E-02
 ETA4
+        3.04E-01  3.07E-01  3.88E-01  1.18E-01
 ETA5
+        3.60E-01  3.43E-01  3.69E-01  3.63E-01  9.51E-02
 ETA6
+        3.23E-01  3.29E-01  3.39E-01  3.45E-01  3.60E-01  6.77E-02
 ETA7
+        3.18E-01  3.08E-01  3.52E-01  3.24E-01  3.57E-01  3.20E-01  8.81E-02
 ETA8
+        3.07E-01  3.24E-01  3.39E-01  3.19E-01  3.09E-01  2.96E-01  3.27E-01  9.07E-02
 ETA9
+        0.00E+00  0.00E+00  0.00E+00  0.00E+00  0.00E+00  0.00E+00  0.00E+00  0.00E+00  0.00E+00
 ET10
+        0.00E+00  0.00E+00  0.00E+00  0.00E+00  0.00E+00  0.00E+00  0.00E+00  0.00E+00  0.00E+00  0.00E+00
 ET11
+        0.00E+00  0.00E+00  0.00E+00  0.00E+00  0.00E+00  0.00E+00  0.00E+00  0.00E+00  0.00E+00  0.00E+00  0.00E+00

 SIGMA - CORR MATRIX FOR RANDOM EFFECTS - EPSILONS  ***
         EPS1      EPS2
 EPS1
+        0.00E+00
 EPS2
+        0.00E+00  0.00E+00
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 Elapsed postprocess time in seconds:    18.99
 Elapsed finaloutput time in seconds:     0.25
 #CPUT: Total CPU Time in Seconds,    57676.856
